*Heading
** Job name: closedloop_step Model name: Cylindrical Panel
** Generated by: Abaqus/CAE 6.13-1
*Preprint, echo=YES, model=YES, history=YES, contact=YES
**
** PARTS
**
*Part, name=Cylinder
*End Part
**
*Part, name=Piezo
*End Part
**
*Part, name=Sensor
*End Part
**
**
** ASSEMBLY
**
*Assembly, name=Assembly
**
*Instance, name=Cylinder-1, part=Cylinder
*Node
      1, -0.0522642322,  0.497260958,  0.200000003
      2, -0.154508501,   0.47552827,  0.200000003
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*Element, type=C3D8R
 1,  102,  581, 1481,  557,    1,   73,  541,   84
 2,  581,  582, 1482, 1481,   73,   74,  542,  541
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*Nset, nset=_G8, internal, generate
    1,  2080,     1
*Elset, elset=_G8, internal, generate
    1,  1500,     1
*Nset, nset=_G9, internal, generate
    1,  2080,     1
*Elset, elset=_G9, internal, generate
    1,  1500,     1
*Nset, nset=Set-1
 26,
*Orientation, name=Ori-1, system=CYLINDRICAL
          0.,           0.,          0.5,           0.,           0.,         -0.5
1, 0.
** Section: HostSec
*Solid Section, elset=_G8, orientation=Ori-1, material=Host
,
*End Instance
**
*Instance, name=Piezo-1, part=Piezo
 -3.97987198752503e-12,  -3.29736238313671e-14,          0.4
*Node
      1, 0.0554000847,  0.527096629,  0.200000003
      2,  0.036970932,  0.528708935,  0.200000003
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*Element, type=C3D20E
  1,   78,   79,   86,   85,    1,    2,    9,    8,  312,  311,  310,  309,  313,  314,  315,
      316,  318,  317,  319,  320
  2,   79,   80,   87,   86,    2,    3,   10,    9,  323,  322,  321,  311,  324,  325,  326,
      314,  317,  327,  328,  319
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*Nset, nset=_G3, internal, generate
    1,  1083,     1
*Elset, elset=_G3, internal, generate
   1,  180,    1
*Nset, nset=_G4, internal, generate
    1,  1083,     1
*Elset, elset=_G4, internal, generate
   1,  180,    1
*Orientation, name=Ori-1, system=CYLINDRICAL
          0.,           0.,          0.2,           0.,           0.,         -0.8
1, 0.
** Section: ActSec
*Solid Section, elset=_G3, orientation=Ori-1, material=Actuator
,
*End Instance
**
*Instance, name=Sensor-1, part=Sensor
 -3.67583741223143e-12,  -4.58882931653193e-13,          0.4
*Node
      1, 0.0517415889,  0.492288351,  0.200000003
      2, 0.0310813077,  0.494023234,  0.200000003
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*Element, type=C3D20E
  1,  67,  68,  74,  73,   1,   2,   8,   7, 268, 267, 266, 265, 269, 270, 271,
     272, 274, 273, 275, 276
  2,  68,  69,  75,  74,   2,   3,   9,   8, 279, 278, 277, 267, 280, 281, 282,
     270, 273, 283, 284, 275
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*Nset, nset=_G3, internal, generate
   1,  922,    1
*Elset, elset=_G3, internal, generate
   1,  150,    1
*Nset, nset=_G4, internal, generate
   1,  922,    1
*Elset, elset=_G4, internal, generate
   1,  150,    1
*Orientation, name=Ori-1, system=CYLINDRICAL
          0.,           0.,          0.2,           0.,           0.,         -0.8
1, 0.
** Section: SenSec
*Solid Section, elset=_G3, orientation=Ori-1, material=Sens
,
*End Instance
**
*Nset, nset=SENSOR_POINT_1, instance=Sensor-1
 1,
*Nset, nset=SENSOR_POINT_2, instance=Sensor-1
 2,
*Nset, nset=SENSOR_POINT_3, instance=Sensor-1
 3,
*Nset, nset=SENSOR_POINT_4, instance=Sensor-1
 7,
*Nset, nset=SENSOR_POINT_5, instance=Sensor-1
 8,
*Nset, nset=SENSOR_POINT_6, instance=Sensor-1
 9,
*Nset, nset=SENSOR_POINT_7, instance=Sensor-1
 13,
*Nset, nset=SENSOR_POINT_8, instance=Sensor-1
 14,
*Nset, nset=SENSOR_POINT_9, instance=Sensor-1
 15,
*Nset, nset=SENSOR_POINT_10, instance=Sensor-1
 19,
*Nset, nset=SENSOR_POINT_11, instance=Sensor-1
 20,
*Nset, nset=SENSOR_POINT_12, instance=Sensor-1
 21,
*Nset, nset=SENSOR_POINT_13, instance=Sensor-1
 25,
*Nset, nset=SENSOR_POINT_14, instance=Sensor-1
 26,
*Nset, nset=SENSOR_POINT_15, instance=Sensor-1
 27,
*Nset, nset=SENSOR_POINT_16, instance=Sensor-1
 31,
*Nset, nset=SENSOR_POINT_17, instance=Sensor-1
 32,
*Nset, nset=SENSOR_POINT_18, instance=Sensor-1
 33,
*Nset, nset=act_lower_layer, instance=Piezo-1
   1,   2,   3,   4,   5,   6
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*Elset, elset=act_lower_layer, instance=Piezo-1, generate
  1,  60,   1
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*Elset, elset=act_sens_back_side, instance=Piezo-1
  55,  56,  57,  58,  59,  60
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*Elset, elset=act_sens_back_side, instance=Sensor-1
  46,  47,  48,  49,  50,  96,  97,  98,  99, 100, 146, 147, 148, 149, 150
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*Elset, elset=act_sens_front_side, instance=Piezo-1
   1,   2,   3,   4,   5,   6
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*Elset, elset=act_sens_front_side, instance=Sensor-1
   1,   2,   3,   4,   5,  51,  52,  53,  54,  55, 101, 102, 103, 104, 105
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*Elset, elset=act_sens_left_side, instance=Piezo-1, generate
   6,  180,    6
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*Nset, nset=act_upper_side, instance=Piezo-1
  232,  233,  234,  235,  236,  237
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*Elset, elset=act_upper_side, instance=Piezo-1, generate
 121,  180,    1
*Nset, nset=actuator_poin2, instance=Piezo-1
 256,
*Nset, nset=actuator_point1, instance=Piezo-1
 244,
*Nset, nset=sens_bottom_side, instance=Sensor-1
   1,   2,   3,   4,   5,   6
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*Elset, elset=sens_bottom_side, instance=Sensor-1, generate
  1,  50,   1
*Nset, nset=sens_upper_layer, instance=Sensor-1
 199, 200, 201, 202, 203, 204
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*Elset, elset=sens_upper_layer, instance=Sensor-1, generate
 101,  150,    1
*Nset, nset=_PickedSet31, internal, instance=Cylinder-1
   40,   41,   43,   44,   54,   55
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*Elset, elset=_PickedSet31, internal, instance=Cylinder-1
  673,  674,  675,  688,  689,  690
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*Nset, nset=_PickedSet32, internal, instance=Cylinder-1
    3,    4,    6,    7,   29,   30
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*Elset, elset=_PickedSet32, internal, instance=Cylinder-1
   13,   14,   15,   28,   29,   30
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*Nset, nset=_PickedSet33, internal, instance=Cylinder-1
   59,   60,   61,   62,   63,   64
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*Elset, elset=_PickedSet33, internal, instance=Cylinder-1
  961,  964,  967,  970,  973,  976
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*Nset, nset=_PickedSet34, internal, instance=Cylinder-1
   45,   46,   47,   48,   49,   50
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*Elset, elset=_PickedSet34, internal, instance=Cylinder-1
  723,  726,  729,  732,  735,  738
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*Elset, elset="_Bottom Layer Cylinder_S2", internal, instance=Cylinder-1, generate
 721,  735,    1
*Surface, type=ELEMENT, name="Bottom Layer Cylinder"
"_Bottom Layer Cylinder_S2", S2
*Elset, elset="_Bottom Layer Piezo_S2", internal, instance=Piezo-1, generate
  1,  60,   1
*Surface, type=ELEMENT, name="Bottom Layer Piezo"
"_Bottom Layer Piezo_S2", S2
*Elset, elset=_CylinderSurface_S1, internal, instance=Cylinder-1
   46,   47,   48,   49,   50,   51
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*Elset, elset=_CylinderSurface_S2, internal, instance=Cylinder-1
  181,  182,  183,  184,  185,  186
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*Surface, type=ELEMENT, name=CylinderSurface
_CylinderSurface_S1, S1
_CylinderSurface_S2, S2
*Elset, elset=_TOP_LAYER_ACTUATOR_S1, internal, instance=Piezo-1, generate
 121,  180,    1
*Surface, type=ELEMENT, name=TOP_LAYER_ACTUATOR
_TOP_LAYER_ACTUATOR_S1, S1
*Elset, elset="_Top Layer Cylinder_S1", internal, instance=Cylinder-1, generate
 766,  780,    1
*Surface, type=ELEMENT, name="Top Layer Cylinder"
"_Top Layer Cylinder_S1", S1
*Elset, elset="_Top Layer Piezo_S1", internal, instance=Sensor-1, generate
 101,  150,    1
*Surface, type=ELEMENT, name="Top Layer Piezo"
"_Top Layer Piezo_S1", S1
*Elset, elset=__PickedSurf40_S2, internal, instance=Cylinder-1, generate
 301,  315,    1
*Surface, type=ELEMENT, name=_PickedSurf40, internal
__PickedSurf40_S2, S2
*Elset, elset=__PickedSurf41_S1, internal, instance=Cylinder-1, generate
 346,  360,    1
*Surface, type=ELEMENT, name=_PickedSurf41, internal
__PickedSurf41_S1, S1
*Nset, nset=_T-Cylinder-1-CylindricalCoor, internal
_PickedSet31,
_PickedSet32,
_PickedSet33,
_PickedSet34,
*Transform, nset=_T-Cylinder-1-CylindricalCoor, type=C
          0.,           0.,          0.5,           0.,           0.,         -0.5
** Constraint: Constraint-1
*Tie, name=Constraint-1, adjust=yes
_PickedSurf41, "Bottom Layer Piezo"
** Constraint: Constraint-2
*Tie, name=Constraint-2, adjust=yes
"Top Layer Piezo", _PickedSurf40
*End Assembly
*Amplitude, name=Amp-4
             0.,              1.,           0.001,              0.,             0.5,              0.
*Amplitude, name=HOSTAMPLITUDE
             0.,              0.,            0.01,              0.,            0.02,            100.,            0.03,              0.
            80.,              0.
*Amplitude, name=PERIODIC, definition=PERIODIC
1,           1256.,              0.,              0.
             0.,              1.
*Amplitude, name=SURFACE_CHARGE, definition=USER, variables=10
**
** MATERIALS
**
*Material, name=Actuator
*Density
5300.,
*Dielectric, type=ORTHO
 1.96e-09, 2.01e-09,  2.8e-10
*Elastic, type=ORTHOTROPIC
 2.39e+11, 1.04e+11, 2.47e+11,  5.2e+10,  5.2e+10, 1.35e+11,  7.6e+10,  6.6e+10
  6.5e+10,
*Piezoelectric
 4.3, -0.4, -0.3,   0.,   0.,   0.,   0.,   0.
   0.,  3.4,   0.,   0.,   0.,   0.,   0.,   0.
  2.8,   0.
*Material, name=Host
*Density
7800.,
*Elastic, type=ORTHOTROPIC
 2.8269e+11, 1.2115e+11, 2.8269e+11, 1.2115e+11, 1.2115e+11, 2.8269e+11,  8.077e+10,  8.077e+10
  8.077e+10,
*Material, name=Sens
*Density
7500.,
*Dielectric, type=ORTHO
 6.56e-09, 6.51e-09,  5.6e-10
*Elastic, type=ORTHOTROPIC
 1.39e+11,  7.8e+10, 1.39e+11, 7.43e+10, 7.43e+10, 1.55e+11, 3.06e+10, 2.56e+10
 2.56e+10,
*Piezoelectric
 15.1, -5.2, -5.2,   0.,   0.,   0.,   0.,   0.
   0., 12.7,   0.,   0.,   0.,   0.,   0.,   0.
 12.7,   0.
**
** BOUNDARY CONDITIONS
**
** Name: BC-1 Type: Symmetry/Antisymmetry/Encastre
*Boundary
_PickedSet31, ENCASTRE
** Name: BC-2 Type: Symmetry/Antisymmetry/Encastre
*Boundary
_PickedSet32, ENCASTRE
** Name: BC-3 Type: Symmetry/Antisymmetry/Encastre
*Boundary
_PickedSet33, ENCASTRE
** Name: BC-4 Type: Symmetry/Antisymmetry/Encastre
*Boundary
_PickedSet34, ENCASTRE
** Name: BC-5 Type: Electric potential
*Boundary
act_lower_layer, 9, 9
** Name: BC-6 Type: Electric potential
*Boundary
sens_upper_layer, 9, 9
** ----------------------------------------------------------------
**
** STEP: Step-1
**
*Step, name=Step-1, nlgeom=NO, inc=1000000000
*Dynamic
1e-13,0.08,1e-13,0.0001
**
** BOUNDARY CONDITIONS
**
** Name: BC-7 Type: Electric potential
*Boundary, amplitude=SURFACE_CHARGE
act_upper_side, 9, 9, 1.
**
** LOADS
**
** Name: Load-1   Type: Pressure
*Dsload, amplitude=Amp-4
CylinderSurface, P, 1e+08
**
** OUTPUT REQUESTS
**
*Restart, write, frequency=0
**
** FIELD OUTPUT: F-Output-1
**
*Output, field
*Node Output
EPOT, U
**
** HISTORY OUTPUT: SENU1
**
*Output, history, sensor, name=SENU1, frequency=1
*Node Output, nset=SENSOR_POINT_1
EPOT,
**
** HISTORY OUTPUT: SENU10
**
*Output, history, sensor, name=SENU10, frequency=1
*Node Output, nset=SENSOR_POINT_10
EPOT,
**
** HISTORY OUTPUT: SENU11
**
*Output, history, sensor, name=SENU11, frequency=1
*Node Output, nset=SENSOR_POINT_11
EPOT,
**
** HISTORY OUTPUT: SENU12
**
*Output, history, sensor, name=SENU12, frequency=1
*Node Output, nset=SENSOR_POINT_12
EPOT,
**
** HISTORY OUTPUT: SENU13
**
*Output, history, sensor, name=SENU13, frequency=1
*Node Output, nset=SENSOR_POINT_13
EPOT,
**
** HISTORY OUTPUT: SENU14
**
*Output, history, sensor, name=SENU14, frequency=1
*Node Output, nset=SENSOR_POINT_14
EPOT,
**
** HISTORY OUTPUT: SENU15
**
*Output, history, sensor, name=SENU15, frequency=1
*Node Output, nset=SENSOR_POINT_15
EPOT,
**
** HISTORY OUTPUT: SENU16
**
*Output, history, sensor, name=SENU16, frequency=1
*Node Output, nset=SENSOR_POINT_16
EPOT,
**
** HISTORY OUTPUT: SENU17
**
*Output, history, sensor, name=SENU17, frequency=1
*Node Output, nset=SENSOR_POINT_17
EPOT,
**
** HISTORY OUTPUT: SENU18
**
*Output, history, sensor, name=SENU18, frequency=1
*Node Output, nset=SENSOR_POINT_18
EPOT,
**
** HISTORY OUTPUT: SENU2
**
*Output, history, sensor, name=SENU2, frequency=1
*Node Output, nset=SENSOR_POINT_2
EPOT,
**
** HISTORY OUTPUT: SENU3
**
*Output, history, sensor, name=SENU3, frequency=1
*Node Output, nset=SENSOR_POINT_3
EPOT,
**
** HISTORY OUTPUT: SENU4
**
*Output, history, sensor, name=SENU4, frequency=1
*Node Output, nset=SENSOR_POINT_4
EPOT,
**
** HISTORY OUTPUT: SENU5
**
*Output, history, sensor, name=SENU5, frequency=1
*Node Output, nset=SENSOR_POINT_5
EPOT,
**
** HISTORY OUTPUT: SENU6
**
*Output, history, sensor, name=SENU6, frequency=1
*Node Output, nset=SENSOR_POINT_6
EPOT,
**
** HISTORY OUTPUT: SENU7
**
*Output, history, sensor, name=SENU7, frequency=1
*Node Output, nset=SENSOR_POINT_7
EPOT,
**
** HISTORY OUTPUT: SENU8
**
*Output, history, sensor, name=SENU8, frequency=1
*Node Output, nset=SENSOR_POINT_8
EPOT,
**
** HISTORY OUTPUT: SENU9
**
*Output, history, sensor, name=SENU9, frequency=1
*Node Output, nset=SENSOR_POINT_9
EPOT,
**
** HISTORY OUTPUT: H-Output-5
**
*Output, history, frequency=1
*Node Output, nset=Cylinder-1.Set-1
U1, U2, U3, UR1, UR2, UR3
**
** HISTORY OUTPUT: ACTU2
**
*Node Output, nset=actuator_poin2
EPOT, U1, U2, U3, UR1, UR2, UR3
**
** HISTORY OUTPUT: ACTU1
**
*Node Output, nset=actuator_point1
EPOT, U1, U2, U3, UR1, UR2, UR3
**
** HISTORY OUTPUT: H-Output-1
**
*Output, history, frequency=1000
*Energy Output
ETOTAL,
*End Step
